n := 13
m := 5
t := trunc(m/n) + 1
t = 1
A := [1, 0, 2, m, 1; 0, 1, 3, m + 1, 0; m + 1, 0, 1, m, 1; 2, 0, 3, 1, m; 1, 3, 4, 0, 1]
A = [1, 0, 2, 5, 1; 0, 1, 3, 6, 0; 6, 0, 1, 5, 1; 2, 0, 3, 1, 5; 1, 3, 4, 0, 1]
f(x, y) :=
    f ← 1 if x == y
    if x ≠ y
        f ← x if x - y == 1
        f ← t if y - x == 1
        f ← 0 if x - y ≠ 1 and y - x ≠ 1
B := matrix(5, 5, f)
B = [1, 1, 0, 0, 0; 1, 1, 1, 0, 0; 0, 2, 1, 1, 0; 0, 0, 3, 1, 1; 0, 0, 0, 4, 1]
c := [1; 2; 3; 4; 5]
C := diag(c)
C = [1, 0, 0, 0, 0; 0, 2, 0, 0, 0; 0, 0, 3, 0, 0; 0, 0, 0, 4, 0; 0, 0, 0, 0, 5]
A + B - C = [1, 1, 2, 5, 1; 1, 0, 4, 6, 0; 6, 2, -1, 6, 1; 2, 0, 6, -2, 6; 1, 3, 4, 4, -3]
A^-1*B = [
    0.764706, 0.352941, -4.35294, 1.94118, 0.0294118;
    -5.70588, -0.941176, 26.9412, -9.17647, 0.0882353;
    4.82353, 0.764706, -22.7647, 8.70588, 0.147059;
    -1.29412, -0.0588235, 7.05882, -2.82353, -0.0882353;
    -2.94118, -0.588235, 14.5882, -5.23529, 0.117647
]
rank(B) = 5
tr(C) = 15
|A| = -34
transpose(A)*B - C = [0, 13, 12, 12, 3; 1, -1, 1, 12, 3; 5, 7, 10, 20, 7; 11, 21, 14, 2, 1; 1, 3, 16, 10, 1]
D := submatrix(C, 2, 3, 2, 3)
D = [3, 0; 0, 4]
|D| = 12
