A := [2, 0, -1; 1, -4, 2; 1, 1, 3]
A1 := [1; -5; 6]
B := [2, 0, -1, 1; 1, -4, 2, -5; 1, 1, 3, 6]
I := lsolve(A, A1)
rank(A) = 3
I = [1; 2; 1]
rank(B) = 3
f :=
    1 if rank(A) == rank(B)
    0 if rank(A) ≠ rank(B)
f = 1
