ORIGIN := 1
m := 5
A := [1, m, 0, 2; 0, 2, m, 1; 0, -1, -3, 0; 0, 0, 0, 2]
eigenvals(A) = [1; 0.618034; -1.61803; 2]
eigenvecs(A) = [
    1, -0.996874, 0.839856, 0.979812;
    0, 0.0761544, -0.439755, 0.139973;
    0, -0.0210486, 0.318209, -0.0279946;
    0, 0, 0, 0.139973
]
t := eigenvals(A)
f :=
    t[1] if (t[1] > t[2]) and (t[1] > t[3]) and (t[1] > t[4])
    t[2] if (t[2] > t[1]) and (t[2] > t[3]) and (t[2] > t[4])
    t[3] if (t[3] > t[1]) and (t[3] > t[2]) and (t[3] > t[4])
    t[4] if (t[4] > t[1]) and (t[4] > t[2]) and (t[4] > t[3])
f = 2
max(t) = 2
eigenvec(A, f) = [0.979812; 0.139973; -0.0279946; 0.139973]
