y(x) := ln(e^x + sqrt(e^(2*x) - 1)) + asin(e^(-x))
d/dx(y(x)) → (e^(2*x)/sqrt(e^(2*x) - 1) + e^x)/(e^x + sqrt(e^(2*x) - 1)) - e^(-x)/sqrt(1 - e^(-2*x))
d^2/dx^2(y(x)) → e^(-x)/sqrt(1 - e^(-2*x)) + e^(-3*x)/(1 - e^(-2*x))^(3/2) + (2*e^(2*x)/sqrt(e^(2*x) - 1) + e^x - e^(4*x)/(e^(2*x) - 1)^(3/2))/(e^x + sqrt(e^(2*x) - 1)) - (e^(2*x)/sqrt(e^(2*x) - 1) + e^x)^2/(e^x + sqrt(e^(2*x) - 1))^2
