D(x, y) := 2 - x^4
y0 := 1
res := Adams(y0, 0, 1, 10^3, D)
transpose(res) =  # no stored result
res1 := rkfixed(y0, 0, 1, 10^3, D)
transpose(res1) =  # no stored result
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Z(x) := 2*x - x^5/5
Y(x) := (30*x^2 - x^6)/30
